# NEMD simulation of a-TaN
# writen by zhicheng, 2024/12/8

#----------------------------------- Define variable ----------------------------------------------#
# Define random numbers
variable     seed          equal 1

variable     Nlay             equal 40
# Steps and time step settings
variable     STEPS_NPT          equal 2e6        # NPT relaxation steps 2e6
variable     STEPS_NVT          equal 2e6          # NVT relaxation steps 2e6
variable     STEPS_NVE1        equal 4e6          # 1st NVE relaxation steps 5e6
variable     STEPS_NVE2        equal 1e7          # 2nd NVE record steps    2e7
variable     dt                        equal  5e-4
variable     THERMO_FREQ   equal 10
variable     DUMP1               equal 1e5          # 1e5
variable     DUMP2               equal 1e5          # 1e5
variable     RECORD              equal 1e5         #1e5
variable     Ld 	           equal 2e5       #2e5

# Temperature and Pressure settings
variable     T                         equal 300
variable     TL                       equal 310
variable     TR                       equal 290
variable     PRES                   equal 1

# ensemble settings
variable     tdamp                equal 250*${dt}
variable     pdamp               equal 1000*${dt}

# Setting for temperature

variable    kB       equal 1.3806504e-23    # [J/K] Boltzmann
variable    eV2J     equal 1.602763e-19     # energy
variable    A2m      equal 1.0e-10          # distance
variable    ps2s     equal 1.0e-12          # time

compute   myke  all ke/atom
variable temp atom c_myke*${eV2J}/(1.5*${kB})

log	output_log_initial_$T_${seed}.loglammps
#--------------------------------------------------------------------------------------------------#
#----------------------------------- Settings -----------------------------------------------------#
units          metal

# Structure
dimension      3
atom_style     atomic
boundary	f p p
read_data      1_after_NPT_relaxtion_.data

# Force potential

plugin load libdeepmd_lmp.so
pair_style     deepmd  theta-TaN-compress-3.11.pb
pair_coeff     *  *

timestep      ${dt} #ps

neighbor	2.0 bin
neigh_modify	delay 10 every 1 check yes
#--------------------------------------------------------------------------------------------------#
group Ta type 1
group N  type 2
group TaN union Ta N
#--------------------------------------------------------------------------------------------------#
velocity     all   create $T ${seed}475191 mom yes rot yes dist gaussian
run_style      verlet
#--------------------------------------------------------------------------------------------------#
#----------------------------------- NEMD settings -----------------------------------------------------#
#Define group for NEMD before relaxation
variable X1 	 equal xlo
variable X2 	 equal xhi
variable Y1 	 equal ylo
variable Y2 	 equal yhi
variable Z1 	 equal zlo
variable Z2 	 equal zhi
variable Dscale  	 equal 1/${Nlay}
variable Len      	 equal ${X2}-${X1}
variable Dx      	 equal ${Len}/${Nlay}
variable   B1    	equal   ${X1}+2*${Dx}              #fix1  2 layers
variable   B2   	equal   ${X1}+4*${Dx}              #bath1 4 layers
variable   B9   	equal   ${X2}-4*${Dx}              #bath2 4 layers
variable   B10   	equal   ${X2}-2*${Dx}              #fix2  2 layers

# Region definition x1 x2 y1 y2 z1 z2
region	reg_all	block  ${X1}    ${X2}	 INF INF  INF INF       units box
region	reg_f1	block  INF      ${B1}   INF INF  INF INF       units box
region	reg_b1	block  ${B1}    ${B2} 	INF INF  INF INF      units box
region	reg_b2	block   ${B9}    ${B10} 	INF INF  INF INF     units box
region	reg_f2	block    ${B10}  INF 	INF INF  INF INF       units box

# Group definition
group	g_all	region	reg_all
group	g_f1	region	reg_f1                    #fixed
group	g_b1	region	reg_b1                   #heatbath1
group	g_b2	region	reg_b2                   #heatbath2
group	g_f2	region	reg_f2                   #fixed
group       g_NVE      subtract    g_all    g_f1   g_f2 # all atoms that belongs to g_all not to g_f1 or g_f2
#--------------------------------------------------------------------------------------------------#
compute   myTemp g_NVE temp
thermo       ${RECORD}
thermo_style custom step temp ke pe etotal press vol lx ly lz density
#----------------------------------- NPT relaxation -----------------------------------------------------#
#-------------------------------------------------------------------------------------------------------#
#----------------------------------- NVT relaxation -----------------------------------------------------#
#fix          nvt1 all nvt temp $T $T ${tdamp}

#dump	      nvt1_dump all xyz ${DUMP1} out_NVT_relax_stru_*.xyz
#dump_modify nvt1_dump element Ta N

#run        ${STEPS_NVT}

#undump nvt1_dump
#unfix      nvt1
#write_data ${seed}_after_NVT_relaxtion_.data
#reset_timestep 0
#----------------------------------------------------------------------------------------------------------#
#----------------------------------- NVE relaxation -----------------------------------------------------#
#velocity fixed zero
velocity   g_f1      set 0  0  0
velocity   g_f2      set 0  0  0

# fixed boundary
fix      1     g_f1     setforce  0   0   0
fix      2     g_f2     setforce  0   0   0

# set up langevin heat bath; tally for energy conservation; random number seed to use for white noise
fix	  3	     g_b1	langevin ${TL} ${TL} ${tdamp} ${seed}8334 tally yes
fix	  4	     g_b2	langevin ${TR} ${TR} ${tdamp} ${seed}8334 tally yes

fix          nve1 g_NVE nve

dump	      nve1_dump all xyz ${DUMP1} out_NVE_relax_stru_*.xyz
dump_modify nve1_dump element Ta N

compute nve1_c_temp all chunk/atom bin/1d x lower ${Dscale} units reduced                    		# lower edge of the box for bins defination; normalized unitless values between 0 and 1
fix  nve1_out_temp all ave/chunk 1 ${RECORD} ${RECORD} nve1_c_temp v_temp file output_temp_relax_${seed}.dat     # Ld steps averaging for temperature

fix    nve1_e_exchange      all     ave/time   ${RECORD}  1   ${RECORD}    f_3       f_4   file   ${seed}NVE1_relax_exchange.dat

run        ${STEPS_NVE1}

undump nve1_dump
unfix      nve1_out_temp
unfix      nve1_e_exchange
write_data ${seed}_after_NVE_relaxtion_.data
reset_timestep 0
#-------------------------------------------------------------------------------------------------------#
#----------------------------------- NVE record -----------------------------------------------------#

dump	nve2_dump        all xyz ${DUMP2} out_cal_stru_*.xyz
dump_modify nve2_dump  element Ta N

# compute and output temperature
compute nve2_c_temp   all chunk/atom bin/1d x lower ${Dscale} units reduced             	 	 # lower edge of the box for bins defination; normalized unitless values between 0 and 1
compute nve2_c_temp1 all chunk/atom bin/1d x lower ${Dscale} units reduced 			# lower edge of the box for bins defination; normalized unitless values between 0 and 1
fix nve2_out_temp   all ave/chunk 1 ${STEPS_NVE2}  ${STEPS_NVE2}  nve2_c_temp   v_temp file  ${seed}output_temp_cal.dat 	# Ct steps averaging for temperature
fix nve2_out_temp1 all ave/chunk 1 ${STEPS_NVE2}  ${STEPS_NVE2}  nve2_c_temp1 v_temp file  ${seed}output_temp_cal1.dat 	# Ct steps averaging for temperature


# Print the steps input_energy output_energy
fix    nve2_e_exchange      all     ave/time  ${RECORD}   1  ${RECORD}    f_3       f_4   file   ${seed}NVE2_cal_exchange.dat
run  ${STEPS_NVE2}

undump nve2_dump
unfix      nve2_out_temp
unfix      nve2_out_temp1
unfix      nve2_e_exchange
#-------------------------------------------------------------------------------------------------------#
